//#ifdef _override_scaling_for_Pelvis
HumanModel.BodyModel.Trunk.Segments.PelvisSeg =
{
  #include "Custom_Seg_Pelvis.any"
};
//#endif //Right Thigh


#if BM_LEG_RIGHT == ON
  #define SEG_SIGN 1
  HumanModel.BodyModel.Right.Leg.Segments =
  {
    Thigh =
    {
     #ifdef _override_scaling_for_Right_Thigh
      #include "Custom_Seg_Thigh.any"
     #endif //Right Thigh
    };

    Shank =
    {
     #ifdef _override_scaling_for_Right_Shank
      #include "Custom_Seg_Shank.any"
     #endif //Right Shank
    };

    Patella =
    {
      #ifdef _override_scaling_for_Right_Patella
       #include "Custom_Seg_Patella.any"
      #endif // Right Patella

      //DrwSurf.Visible = Off;
    };

// To be added later
// #ifdef _override_scaling_for_Right_Talus
// HumanModel.BodyModel.Right.Leg =
// {
//   Segments.Talus =
//   {
//     #define SEG_SIGN 1
//     #include "Custom_Seg_Talus.any"
//     #undef SEG_SIGN
//   };
//  #endif
  };
  #undef SEG_SIGN
#endif //Right LEG


#if BM_LEG_LEFT == ON
 #define SEG_SIGN -1
  HumanModel.BodyModel.Left.Leg.Segments =
  {
    Thigh =
    {
     #ifdef _override_scaling_for_Left_Thigh
      #include "Custom_Seg_Thigh.any"
     #endif // Left Thigh
    };

    Shank =
    {
     #ifdef _override_scaling_for_Left_Shank
      #include "Custom_Seg_Shank.any"
     #endif // Left Shank
    };

    Patella =
    {
     #ifdef _override_scaling_for_Left_Patella
      #include "Custom_Seg_Patella.any"
     #endif // Right Patella

      //DrwSurf.Visible = Off;
    };

// To be added later
// HumanModel.BodyModel.Left.Leg =
// {
//   Seg.Talus =
//   {
//     #define SEG_SIGN -1
//     #include "Custom_Seg_Talus.any"
//     #undef SEG_SIGN
//   };
// };
  };
   #undef SEG_SIGN
#endif

HumanModel.BodyModel =
{
  #if BM_LEG_RIGHT == ON
  Right.Leg =
  {
    Joints =
    {
      #if (BM_JOINT_TYPE_HIP_RIGHT == _JOINT_TYPE_USERDEFINED_)
      AnySphericalJoint Hip =
      {
        AnyRefNode &ThighNode = ..Segments.Thigh.HipJoint;
        AnyRefNode &PelvisNode = ..Segments.Pelvis.HipJoint;
      };//Hip
      #endif


      #if (BM_JOINT_TYPE_KNEE_RIGHT == _JOINT_TYPE_USERDEFINED_)
//       #if KNEE_JOINT_TYPE == __SPHERICAL__

        AnySphericalJoint Knee = {
          AnyRefNode &ThighNode = ..Segments.Thigh.KneeJoint;
          AnyRefNode &ShankNode = ..Segments.Shank.KneeJoint;
        };
        AnyKinRotational KneeRot = {
          AnyRefNode &ThighNode = ..Segments.Thigh.KneeJoint;
          AnyRefNode &ShankNode = ..Segments.Shank.KneeJoint;
          Type = PlanarAngles;
        };
        AnyKinEqSimpleDriver KneeRotations = {
          DriverPos = {0,0};
          DriverVel = {0,0};
          AnyKinMeasure &Measure = .KneeMoments.org;
          CType = {Soft, Soft};
          Reaction.Type = {Off, Off};
          WeightFun = {&wFun, &wFun};
          AnyFunConst wFun = {Value = {1e-3};};
        };
        AnyReacForce KneeMoments = {
          AnyKinMeasureOrg org = {
            AnyKinMeasure &KneeRot = ..KneeRot;
            MeasureOrganizer = {1,2};
          };
        };
//     #else
//
//       AnyRevoluteJoint Knee =
//       {
//         Axis = z;
//         AnyRefNode &ThighNode = ..Segments.Thigh.KneeJoint;
//         AnyRefNode &ShankNode = ..Segments.Shank.KneeJoint;
//         AnyDrawStdJoint Knee = {  };
//       };//Knee
//       #endif
      #endif

      #if (BM_JOINT_TYPE_PATELLOFEMORAL_RIGHT == _JOINT_TYPE_USERDEFINED_)
      AnyRevoluteJoint PatellaFemur =
      {
        Axis = z;
        AnyRefNode &ThighNode = ..Segments.Thigh.PatellaFemurJoint;
        AnyRefNode &PatellaNode = ..Segments.Patella.PatellaFemurJoint;
      };//Patellafemur
      #endif

      #if (BM_JOINT_TYPE_ANKLE_RIGHT == _JOINT_TYPE_USERDEFINED_)
      AnyRevoluteJoint Ankle =
      {
        Axis = z; //flexion extension
        AnyRefNode &ShankNode = ..Segments.Shank.AnkleJoint;
        AnyRefNode &FootNode  = ..Segments.Talus.AnkleJoint;
      };//Ankle
      #endif

//      #if (BM_JOINT_TYPE_PATELLATENDON_RIGHT == _JOINT_TYPE_USERDEFINED_)
//      AnyFolder KinematicMeasures =
//      {
//        AnyKinPLine Patella =
//        {
//          AnyRefNode &Origin_patella_tendon = ...Segments.Patella.Origin_patella_tendon;
//          AnyRefNode &Insertion_patella_tendon = ...Segments.Shank.Insertion_patella_tendon;
//
//          AnyDrawPLine Patella_tendon =
//          {
//            Thickness = 0.001;
//            RGB = {1,0,0};
//            Opacity = ....BonesOpacity.Patella;
//          };
//        };
//      };
//      AnyKinEqSimpleDriver PatellaMovement =
//      {
//        AnyKinPLine &Jnt = .KinematicMeasures.Patella;
//        AnyVar lengthScale = vnorm(..Segments.Shank.KneeJoint.sRel - ..Segments.Shank.Insertion_patella_tendon.sRel)
//        / vnorm(..Segments.Shank.StdPar.Insertion_patella_tendon-..Segments.Shank.StdPar.KneeJoint);
//        AnyVar TendonLength_Scaled =  lengthScale *..ModelParameters.PatellarLigamentLength;
//        AnyVar TendonLength_Custom = DEF_CUSTOM_SCALING_PATELLA_TENDON_LENGTH;
//
//        DriverPos = {TendonLength_Custom};
//        DriverVel = {0.0};
//        Reaction.Type = {On};  // The muscles must do the work
//      };
//      #endif
    };//Jnt
  };
  #endif

  #if BM_LEG_LEFT == ON
  Left.Leg =
  {
    Joints =
    {
      #if (BM_JOINT_TYPE_HIP_LEFT == _JOINT_TYPE_USERDEFINED_)
      AnySphericalJoint Hip =
      {
        AnyRefNode &ThighNode = ..Segments.Thigh.HipJoint;
        AnyRefNode &PelvisNode = ..Segments.Pelvis.HipJoint;
      };//Hip
      #endif

      #if (BM_JOINT_TYPE_KNEE_LEFT == _JOINT_TYPE_USERDEFINED_)

       //#if KNEE_JOINT_TYPE == __SPHERICAL__

        AnySphericalJoint Knee = {
          AnyRefNode &ThighNode = ..Segments.Thigh.KneeJoint;
          AnyRefNode &ShankNode = ..Segments.Shank.KneeJoint;
        };
        AnyKinRotational KneeRot = {
          AnyRefNode &ThighNode = ..Segments.Thigh.KneeJoint;
          AnyRefNode &ShankNode = ..Segments.Shank.KneeJoint;
          Type = PlanarAngles;
        };
        AnyKinEqSimpleDriver KneeRotations = {
          DriverPos = {0,0};
          DriverVel = {0,0};
          AnyKinMeasure &Measure = .KneeMoments.org;
          CType = {Soft, Soft};
          Reaction.Type = {Off, Off};
          WeightFun = {&wFun, &wFun};
          AnyFunConst wFun = {Value = {1};};
        };
        AnyReacForce KneeMoments = {
          AnyKinMeasureOrg org = {
            AnyKinMeasure &KneeRot = ..KneeRot;
            MeasureOrganizer = {1,2};
          };
        };
//     #else
//
//       AnyRevoluteJoint Knee =
//       {
//         Axis = z;
//         AnyRefNode &ThighNode = ..Segments.Thigh.KneeJoint;
//         AnyRefNode &ShankNode = ..Segments.Shank.KneeJoint;
//         AnyDrawStdJoint Knee = {  };
//       };//Knee
//       #endif
      #endif

      #if (BM_JOINT_TYPE_PATELLOFEMORAL_LEFT == _JOINT_TYPE_USERDEFINED_)
      AnyRevoluteJoint PatellaFemur =
      {
        Axis = z;
        AnyRefNode &ThighNode = ..Segments.Thigh.PatellaFemurJoint;
        AnyRefNode &PatellaNode = ..Segments.Patella.PatellaFemurJoint;
      };//Patellafemur
      #endif

      #if (BM_JOINT_TYPE_ANKLE_LEFT == _JOINT_TYPE_USERDEFINED_)
      AnyRevoluteJoint Ankle =
      {
        Axis = z; //flexion extension
        AnyRefNode &ShankNode = ..Segments.Shank.AnkleJoint;
        AnyRefNode &FootNode  = ..Segments.Talus.AnkleJoint;
      };//Ankle
      #endif

//      #if (BM_JOINT_TYPE_PATELLATENDON_LEFT == _JOINT_TYPE_USERDEFINED_)
//      AnyFolder KinematicMeasures =
//      {
//        AnyKinPLine Patella =
//        {
//          AnyRefNode &Origin_patella_tendon = ...Segments.Patella.Origin_patella_tendon;
//          AnyRefNode &Insertion_patella_tendon = ...Segments.Shank.Insertion_patella_tendon;
//
//          AnyDrawPLine Patella_tendon =
//          {
//            Thickness = 0.001;
//            RGB = {1,0,0};
//            Opacity = ....BonesOpacity.Patella;
//          };
//        };
//      };
//      AnyKinEqSimpleDriver PatellaMovement =
//      {
//        AnyKinPLine &Jnt = .KinematicMeasures.Patella;
//        AnyVar lengthScale = vnorm(..Segments.Shank.KneeJoint.sRel - ..Segments.Shank.Insertion_patella_tendon.sRel)
//        / vnorm(..Segments.Shank.StdPar.Insertion_patella_tendon-..Segments.Shank.StdPar.KneeJoint);
//        AnyVar TendonLength_Scaled =  lengthScale *..ModelParameters.PatellarLigamentLength;
//        AnyVar TendonLength_Custom = DEF_CUSTOM_SCALING_PATELLA_TENDON_LENGTH;
//
//        DriverPos = {TendonLength_Custom};
//        DriverVel = {0.0};
//        Reaction.Type = {On};  // The muscles must do the work
//      };
//      #endif
    };//Jnt
  };
  #endif
};
